f(x, n) := (sqrt(x^3 + n) + cos(|n*x - 1|))/(nthroot(x^5 + sin(x) + n, 4)*cos(π*(x + n)/4))
t := 2
n := 1, 2 .. 10
f(2, 3) = -2.07994
f(t, n) = [0; 0; 0; -9.31612e15; 0; 0; 0; 4.18499e15; 0; 0]
# задание 2
x := 7
y := 10
z := -3
p := if(x > y, sin(x) + 3*|y| - z^2, (y + 3)*ln(|x + 1|)/sqrt(z^2 + 1))
p = 8.5485
q := if((x > y) and (x < 1), cos(x) + 2*|y + 1| - z, (x*y + 3)/sqrt(y^2 + 5))
q = 7.12407
w := if((x < y) or (y ≥ 10), x^2 + 2*(y*x + 1) - z, (x^-3*y^2 + 3)*sqrt(z^2 + 7))
w = 194
# задание 3
k(x, n) := (x^2 - n*x + sin(x))*sqrt(|x - cos(n*x)|)
x1 := -2
x2 := 2
Δx := 0.4
u := x1, x1 + Δx .. x2
k(u, 6) = [25.4486; 8.75444; 10.3653; 4.44907; 1.2608; 0; -1.97362; -2.90593; -3.7136; -9.71117; -7.62422]
# задание 4
n := 9
a := -3*n
a = -27
b := 3*n
b = 27
vecA := runif(3, a, b)
vecA = [-26.9315; -16.5606; 4.59033]
Al := length(vecA)
Al = 3
vecB := runif(3, a, b)
vecB = [-8.08336; 17.4332; -17.597]
Bl := length(vecB)
Bl = 3
vecC := runif(3, a, b)
vecC = [11.3668; -10.5848; -22.0638]
Cl := length(vecC) = 3
s2 := transpose(vecA)*vecB
s2 = -151.783
s1 := vecA*vecB
s1 = -151.783
vecV := vecB×vecC
vecV = [-570.904; -378.371; -112.599]
w2 := (vecA×vecB)*vecC
w2 = 21124.5
l := if(length(vecA) > length(vecB) and length(vecA) > length(vecC), "Это А", if(length(vecB) > length(vecA) and length(vecB) > length(vecC), "Это В", if(length(vecC) > length(vecA) and length(vecC) > length(vecB), "Это С", "они равны")))
l = "они равны"
N := 5
